// SBML level 3 version 2
// Created with https://github.com/matthiaskoenig/sbmlutils.

model empagliflozin_kidney(Vext, Vki, Vurine, emp_ext, emp, emp_urine, eg_ext, eg, eg_urine, glc_urine)
  // Model for renal empagliflozin excretion.
  // version 3
  // Changelog
  // version 1
  // initial model
  // The content of this model has been carefully created in a manual research effort.
  // Terms of use
  // Copyright © 2026 Matthias König.
  // This work is licensed under a Creative Commons Attribution 4.0 International License.
  // Redistribution and use of any part of this model, with or without modification, are permitted provided that the following conditions are met:
  // Redistributions of this SBML file must retain the above copyright notice, this list of conditions and the following disclaimer.
  // Redistributions in a different form must reproduce the above copyright notice, this list of conditions and the following disclaimer in the documentation and/or other materials provided with the distribution.
  // This model is distributed in the hope that it will be useful, but WITHOUT ANY WARRANTY; without even the implied warranty of MERCHANTABILITY or FITNESS FOR A PARTICULAR PURPOSE.
  // hasTaxon taxonomy:9606 snomedct:337915000
  // hasProperty mamo:MAMO_0000046 ncit:C158136 ncit:C98083 ncit:C15299 ncit:C2985 ncit:C99532
  // isDescribedBy doi:10.5281/zenodo.18480677
  // occursIn FMA:7203 BTO:0000671 ncit:C12415
  // model units - substance: mmole, time: min, volume: litre, area: m2, length: metre, extent: mmole

  // Compartments:
  compartment Vext = 1.5 litre; Vext is "plasma";  // SBO:0000290 ncit:C13356 BTO:0000131
  compartment Vki = 0.3 litre; Vki is "kidney";  // SBO:0000290 FMA:7203 BTO:0000671 ncit:C12415
  compartment Vmem = NaN; Vmem has m2; Vmem is "plasma membrane";  // 2-D; SBO:0000290 ncit:C13735 FMA:63841 GO:0005886
  compartment Vurine = 1 litre;  // SBO:0000290 FMA:12274 ncit:C13283 BTO:0001419

  // Species:
  species emp_ext in Vext = 0; emp_ext is "empagliflozin (plasma)";  // SBO:0000247 CHEBI:82720 pubchem.compound:11949646 inchikey:OBWASQILIWPZMG-QZMOQZSNSA-N
  species emp in Vki = 0; emp is "empagliflozin (kidney)";  // SBO:0000247 CHEBI:82720 pubchem.compound:11949646 inchikey:OBWASQILIWPZMG-QZMOQZSNSA-N
  substanceOnly species emp_urine in Vurine = 0; emp_urine is "empagliflozin (urine)";  // SBO:0000247 CHEBI:82720 pubchem.compound:11949646 inchikey:OBWASQILIWPZMG-QZMOQZSNSA-N
  species eg_ext in Vext = 0; eg_ext is "empagliflozin-glucuronide (plasma)";  // SBO:0000247
  species eg in Vki = 0; eg is "empagliflozin-glucuronide (kidney)";  // SBO:0000247
  substanceOnly species eg_urine in Vurine = 0; eg_urine is "empagliflozin-glucuronide (urine)";  // SBO:0000247
  // Fasting plasma glucose (FPG). Model depends on the fasting plasma glucose:
  // as a proxy of the daily glucose variation in the glucose excretion
  // to set the glucose dependent RTG values (i.e. T2DM have higher SGLT2 amounts, and consequently higher RTG values)
  species $fpg in Vext = 5; fpg is "fasting plasma glucose (FPG)";  // SBO:0000247 CHEBI:4167 ncit:C2831
  substanceOnly species glc_urine in Vurine = 0; glc_urine is "glucose (urine)";  // SBO:0000247 CHEBI:4167 ncit:C2831

  // Parameters:
  // scaling factor for renal function. 1.0: normal renal function; <1.0: reduced renal function
  f_renal_function = 1 dimensionless; f_renal_function is "parameter for renal function";  // SBO:0000009
  Mr_glc = 180 g_per_mole; Mr_glc is "Molecular weight glc [g/mole]";  // SBO:0000647
  cf_mg_per_g = 1000 mg_per_g; cf_mg_per_g is "Conversion factor mg per g";
  cf_ml_per_l = 1000 ml_per_l; cf_ml_per_l is "Conversion factor ml per l";
  GFR_healthy = 100 ml_per_min; GFR_healthy is "Glomerular filtration rate (healthy)";
  RTG_E50 = 7.19e-6 mM; RTG_E50 is "EC50 reduction in RTG";  // SBO:0000009
  RTG_gamma = 1 dimensionless; RTG_gamma is "hill coefficient reduction in RTG";  // SBO:0000009
  // Typical RTG value without SGLT2 inhibitors in healthy subjects.
  // This corresponds to the SGLT2 concentrations.
  RTG_base = 12.5 mM; RTG_base is "Baseline RTG value";
  // Effect of the FPG on the change in RTG_base.
  RTG_m_fpg = 0.5 dimensionless; RTG_m_fpg is "FPG effect on RTG";
  // maximum inhibition of RTG via SGLT2
  RTG_max_inhibition = 0.75 dimensionless; RTG_max_inhibition is "RTG maximum inhibition";
  fpg_healthy = 5 mM; fpg_healthy is "fasting plasma glucose (healthy)";
  EMPIM_k = 100 per_min; EMPIM_k is "rate empagliflozin import";  // SBO:0000153
  EGIM_k = 100 per_min; EGIM_k is "rate empagliflozin-glucuronide import";  // SBO:0000153
  EMP2EG_Vmax = 0.04 mmole_per_min_l; EMP2EG_Vmax is "Vmax empagliflozin conversion";  // SBO:0000186
  EMP2EG_Km_emp = 0.02 mM; EMP2EG_Km_emp is "Km empagliflozin UGT";  // SBO:0000027
  // Scaling factor to vary UGT activity. 1.0: unchanged activity; < 1.0 decreased activity; >1.0 increased activity.
  f_ugt = 1 dimensionless; f_ugt is "scaling factor UGT activity";  // SBO:0000002
  EMPEX_k = 0.003 per_min; EMPEX_k is "rate urinary excretion of empagliflozin";  // SBO:0000009
  EGEX_k = 0.01 per_min; EGEX_k is "rate urinary excretion of empagliflozin-glucuronide";  // SBO:0000009
  RTG_fpg has mM; RTG_fpg is "RTG value (FPG)";
  RTG_delta has mM; RTG_delta is "RTG value";
  RTG has mM; RTG is "renal threshold glucose (RTG)";
  GFR has ml_per_min; GFR is "glomerular filtration rate";
  UGE has gram; UGE is "urinary glucose excretion (UGE)";

  // Assignment rules:
  // FPG dependent base RTG value. SGLT2 is induced in T2DM [Rahmoune2005]
  RTG_fpg := RTG_base + RTG_m_fpg*(fpg - fpg_healthy);
  // ΔRTG, maximum reduction in RTG due to SGLT2 inhibition. Normally around 7 - 10 mM.
  RTG_delta := RTG_fpg*RTG_max_inhibition;
  // Renal threshold glucose.
  // The renal threshold for glucose (RTG) is the plasma glucose concentration at which tubular reabsorption of glucose begins to saturate; glucose is excreted into the urine in direct proportion to the glucose concentration above this threshold. 12.3 - 12.7 mM RTG (placebo) [Devineni2012]
  RTG := RTG_fpg - RTG_delta*emp_ext^RTG_gamma/(RTG_E50^RTG_gamma + emp_ext^RTG_gamma);
  GFR := f_renal_function*GFR_healthy;
  // Urinary glucose excretion is calculated from cumulative amount of glucose in urine.
  UGE := glc_urine*Mr_glc/cf_mg_per_g;

  // Reactions:
  EMPIM: emp_ext -> emp; EMPIM_k*Vki*(emp_ext - emp); EMPIM is "empagliflozin import (EMPIM)";  // SBO:0000655
  EGIM: eg_ext -> eg; EGIM_k*Vki*(eg_ext - eg); EGIM is "empagliflozin-glucuronide import (EGIM)";  // SBO:0000655
  EMP2EG: emp => eg; f_ugt*EMP2EG_Vmax*Vki*emp/(emp + EMP2EG_Km_emp); EMP2EG is "empagliflozin glucuronidation (EMP2EG) UGT";  // SBO:0000176
  EMPEX: emp_ext => emp_urine; f_renal_function*EMPEX_k*Vki*emp_ext; EMPEX is "empagliflozin excretion (EMPEX)";  // SBO:0000655
  EGEX: eg_ext => eg_urine; f_renal_function*EGEX_k*Vki*eg_ext; EGEX is "empagliflozin-glucuronide excretion (EGEX)";  // SBO:0000655
  GLCEX: $fpg => glc_urine; piecewise(GFR/cf_ml_per_l*(fpg - RTG), fpg > RTG, 0 mmole_per_min); GLCEX is "glucose excretion (GLCEX)";  // modifiers: emp_ext; SBO:0000655

  // Unit definitions:
  unit g_per_mole = gram / mole; g_per_mole is "g/mole";
  unit l_per_min = litre / (60 second); l_per_min is "l/min";
  unit m2 = metre^2; m2 is "meter^2";
  unit mM = 1e-3 mole / litre; mM is "mmole/liter";
  unit mg = 1e-3 gram;
  unit mg_per_g = 1e-3 gram / gram; mg_per_g is "mg/g";
  unit mg_per_s_l = 1e-3 gram / (second * litre); mg_per_s_l is "mg/s/l";
  unit min = 60 second;
  unit min_per_hr = 60 second / (3600 second); min_per_hr is "min/hour";
  unit ml_per_l = 1e-3 litre / litre; ml_per_l is "ml/l";
  unit ml_per_min = 1e-3 litre / (60 second); ml_per_min is "ml/min";
  unit mmole = 1e-3 mole;
  unit mmole_per_min = 1e-3 mole / (60 second); mmole_per_min is "mmole/min";
  unit mmole_per_min_l = 1e-3 mole / (60 second * litre); mmole_per_min_l is "mmole/min/l";
  unit per_min = 1 / (60 second); per_min is "1/min";
  unit per_mmole = 1 / (1e-3 mole); per_mmole is "1/mmole";
end
