// SBML level 3 version 2
// Created with https://github.com/matthiaskoenig/sbmlutils.

model empagliflozin_liver(Vext, Vli, Vbi, Vlumen, emp_ext, eg_ext, eg_lumen)
  // Model for hepatic empagliflozin metabolism.
  // Model for empagliflozin metabolism.
  // The content of this model has been carefully created in a manual research effort.
  // Terms of use
  // Copyright © 2026 Matthias König.
  // This work is licensed under a Creative Commons Attribution 4.0 International License.
  // Redistribution and use of any part of this model, with or without modification, are permitted provided that the following conditions are met:
  // Redistributions of this SBML file must retain the above copyright notice, this list of conditions and the following disclaimer.
  // Redistributions in a different form must reproduce the above copyright notice, this list of conditions and the following disclaimer in the documentation and/or other materials provided with the distribution.
  // This model is distributed in the hope that it will be useful, but WITHOUT ANY WARRANTY; without even the implied warranty of MERCHANTABILITY or FITNESS FOR A PARTICULAR PURPOSE.
  // hasTaxon taxonomy:9606 snomedct:337915000
  // hasProperty mamo:MAMO_0000046 ncit:C158136 ncit:C98083 ncit:C15299 ncit:C2985 ncit:C99532
  // isDescribedBy doi:10.5281/zenodo.18480677
  // occursIn FMA:7197 BTO:0000759 ncit:C12392
  // model units - substance: mmole, time: min, volume: litre, area: m2, length: metre, extent: mmole

  // Compartments:
  compartment Vext = 1.5 litre; Vext is "plasma";  // SBO:0000290 ncit:C13356 BTO:0000131
  compartment Vli = 1.5 litre; Vli is "liver";  // SBO:0000290 FMA:7197 BTO:0000759 ncit:C12392
  compartment Vmem = NaN; Vmem has m2; Vmem is "plasma membrane";  // 2-D; SBO:0000290 ncit:C13735 FMA:63841 GO:0005886
  compartment Vapical = NaN; Vapical has m2; Vapical is "apical membrane";  // 2-D; SBO:0000290 FMA:84666 GO:0016324
  compartment Vbi = 1 litre; Vbi is "bile";  // SBO:0000290 FMA:62971 ncit:C13192
  compartment Vlumen = 1.15425 litre; Vlumen is "intestinal lumen (inner part of intestine)";  // SBO:0000290 FMA:14586 UBERON:0018543

  // Species:
  species emp_ext in Vext = 0; emp_ext is "empagliflozin (plasma)";  // SBO:0000247 CHEBI:82720 pubchem.compound:11949646 inchikey:OBWASQILIWPZMG-QZMOQZSNSA-N
  species eg_ext in Vext = 0; eg_ext is "empagliflozin-glucuronide (plasma)";  // SBO:0000247
  species emp in Vli = 0; emp is "empagliflozin (liver)";  // SBO:0000247 CHEBI:82720 pubchem.compound:11949646 inchikey:OBWASQILIWPZMG-QZMOQZSNSA-N
  species eg in Vli = 0; eg is "empagliflozin-glucuronide (liver)";  // SBO:0000247
  // Bile EG in amount.
  substanceOnly species eg_bi in Vbi = 0; eg_bi is "empagliflozin-glucuronide (bile)";  // SBO:0000247
  species eg_lumen in Vlumen = 0; eg_lumen is "EG (lumen)";  // SBO:0000247

  // Parameters:
  EMPIM_k = 100 per_min; EMPIM_k is "rate empagliflozin import";  // SBO:0000153
  EMP2EG_Vmax = 0.04 mmole_per_min_l; EMP2EG_Vmax is "Vmax empagliflozin conversion";  // SBO:0000186
  EMP2EG_Km_emp = 0.02 mM; EMP2EG_Km_emp is "Km empagliflozin UGT";  // SBO:0000027
  // Scaling factor to vary UGT activity. 1.0: unchanged activity; < 1.0 decreased activity; >1.0 increased activity.
  f_ugt = 1 dimensionless; f_ugt is "scaling factor UGT activity";  // SBO:0000002
  EGEX_k = 10 per_min; EGEX_k is "rate EG export";  // SBO:0000186
  EGBIEX_k = 0.0001 per_min; EGBIEX_k is "rate for EG export in bile";  // SBO:0000009

  // Reactions:
  EMPIM: emp_ext -> emp; EMPIM_k*Vli*(emp_ext - emp); EMPIM is "empagliflozin import (EMPIM)";  // SBO:0000655
  EMP2EG: emp => eg; f_ugt*EMP2EG_Vmax*Vli*emp/(emp + EMP2EG_Km_emp); EMP2EG is "empagliflozin glucuronidation (EMP2EG) UGT";  // SBO:0000176
  EGEX: eg -> eg_ext; EGEX_k*Vli*(eg - eg_ext); EGEX is "EG export (EGEX)";  // SBO:0000655
  EGBIEX: eg => eg_bi; EGBIEX_k*Vli*eg; EGBIEX is "EG bile export";  // SBO:0000655
  EGEHC: eg_bi => eg_lumen; EGBIEX; EGEHC is "EG enterohepatic circulation";  // SBO:0000655

  // Unit definitions:
  unit g_per_mole = gram / mole; g_per_mole is "g/mole";
  unit l_per_min = litre / (60 second); l_per_min is "l/min";
  unit m2 = metre^2; m2 is "meter^2";
  unit mM = 1e-3 mole / litre; mM is "mmole/liter";
  unit mg = 1e-3 gram;
  unit mg_per_s_l = 1e-3 gram / (second * litre); mg_per_s_l is "mg/s/l";
  unit min = 60 second;
  unit min_per_hr = 60 second / (3600 second); min_per_hr is "min/hour";
  unit mmole = 1e-3 mole;
  unit mmole_per_min = 1e-3 mole / (60 second); mmole_per_min is "mmole/min";
  unit mmole_per_min_l = 1e-3 mole / (60 second * litre); mmole_per_min_l is "mmole/min/l";
  unit per_min = 1 / (60 second); per_min is "1/min";
  unit per_mmole = 1 / (1e-3 mole); per_mmole is "1/mmole";
end
