// SBML level 3 version 2
// Created with https://github.com/matthiaskoenig/sbmlutils.

model empagliflozin_intestine(PODOSE_emp, Ka_dis_emp, Mr_emp, Vext, Vgu, Vlumen, Vfeces, Vstomach, emp_lumen, emp_feces, emp_ext, eg_lumen, eg_feces)
  // Model for empagliflozin absorption in the small intestine
  // Model for empagliflozin absorption
  // absorption empagliflozin (emp), ~60% fraction absorbed
  // The content of this model has been carefully created in a manual research effort.
  // Terms of use
  // Copyright © 2026 Matthias König.
  // This work is licensed under a Creative Commons Attribution 4.0 International License.
  // Redistribution and use of any part of this model, with or without modification, are permitted provided that the following conditions are met:
  // Redistributions of this SBML file must retain the above copyright notice, this list of conditions and the following disclaimer.
  // Redistributions in a different form must reproduce the above copyright notice, this list of conditions and the following disclaimer in the documentation and/or other materials provided with the distribution.
  // This model is distributed in the hope that it will be useful, but WITHOUT ANY WARRANTY; without even the implied warranty of MERCHANTABILITY or FITNESS FOR A PARTICULAR PURPOSE.
  // hasTaxon taxonomy:9606 snomedct:337915000
  // hasProperty mamo:MAMO_0000046 ncit:C158136 ncit:C98083 ncit:C15299 ncit:C2985 ncit:C99532
  // isDescribedBy doi:10.5281/zenodo.18480677
  // occursIn FMA:45615 BTO:0000545 ncit:C12736 FMA:7199 BTO:0000648
  // model units - substance: mmole, time: min, volume: litre, area: m2, length: metre, extent: mmole

  // Compartments:
  compartment Vext = 1 litre; Vext is "plasma";  // SBO:0000290 ncit:C13356 BTO:0000131
  compartment Vgu = 1.2825 litre; Vgu is "intestine";  // SBO:0000290 FMA:45615 BTO:0000545 ncit:C12736
  compartment Vlumen = 1.15425 litre; Vlumen is "intestinal lumen (inner part of intestine)";  // SBO:0000290 FMA:14586 UBERON:0018543
  compartment Vfeces = 1 litre;  // SBO:0000290 FMA:64183 ncit:C13234 BTO:0000440
  compartment Ventero = 1 litre; Ventero is "intestinal lining (enterocytes)";  // SBO:0000290
  compartment Vapical = NaN; Vapical has m2; Vapical is "apical membrane (intestinal membrane enterocytes)";  // 2-D; SBO:0000290 FMA:84666 GO:0016324
  compartment Vbaso = NaN; Vbaso has m2; Vbaso is "basolateral membrane (intestinal membrane enterocytes)";  // 2-D; SBO:0000290 FMA:84669 GO:0016323
  compartment Vstomach = 1 litre;  // SBO:0000290 FMA:7148 ncit:C12391 UBERON:0000945
  compartment Vintestine_0 = 0.23085 litre; Vintestine_0 is "intestinal lumen";  // SBO:0000290 FMA:14586 UBERON:0018543
  compartment Vintestine_1 = 0.23085 litre; Vintestine_1 is "intestinal lumen";  // SBO:0000290 FMA:14586 UBERON:0018543
  compartment Vintestine_2 = 0.23085 litre; Vintestine_2 is "intestinal lumen";  // SBO:0000290 FMA:14586 UBERON:0018543
  compartment Vintestine_3 = 0.23085 litre; Vintestine_3 is "intestinal lumen";  // SBO:0000290 FMA:14586 UBERON:0018543
  compartment Vintestine_4 = 0.23085 litre; Vintestine_4 is "intestinal lumen";  // SBO:0000290 FMA:14586 UBERON:0018543

  // Species:
  substanceOnly species $emp_stomach in Vstomach = 0; emp_stomach is "empagliflozin (stomach)";  // SBO:0000247 CHEBI:82720 pubchem.compound:11949646 inchikey:OBWASQILIWPZMG-QZMOQZSNSA-N
  species emp_lumen in Vlumen = 0; emp_lumen is "empagliflozin (intestinal volume)";  // SBO:0000247 CHEBI:82720 pubchem.compound:11949646 inchikey:OBWASQILIWPZMG-QZMOQZSNSA-N
  substanceOnly species emp_feces in Vfeces = 0; emp_feces is "empagliflozin (feces)";  // SBO:0000247 CHEBI:82720 pubchem.compound:11949646 inchikey:OBWASQILIWPZMG-QZMOQZSNSA-N
  species emp_ext in Vext = 0; emp_ext is "empagliflozin (plasma)";  // SBO:0000247 CHEBI:82720 pubchem.compound:11949646 inchikey:OBWASQILIWPZMG-QZMOQZSNSA-N
  species eg_lumen in Vlumen = 0; eg_lumen is "empagliflozin glucuronide (intestinal volume)";  // SBO:0000247
  substanceOnly species eg_feces in Vfeces = 0; eg_feces is "empagliflozin glucuronide (feces)";  // SBO:0000247
  species emp_intestine_0 in Vintestine_0 = 0; emp_intestine_0 is "empagliflozin (intestine)";  // SBO:0000247 CHEBI:82720 pubchem.compound:11949646 inchikey:OBWASQILIWPZMG-QZMOQZSNSA-N
  species eg_intestine_0 in Vintestine_0 = 0; eg_intestine_0 is "empagliflozin glucuronide (intestine)";  // SBO:0000247
  species emp_intestine_1 in Vintestine_1 = 0; emp_intestine_1 is "empagliflozin (intestine)";  // SBO:0000247 CHEBI:82720 pubchem.compound:11949646 inchikey:OBWASQILIWPZMG-QZMOQZSNSA-N
  species eg_intestine_1 in Vintestine_1 = 0; eg_intestine_1 is "empagliflozin glucuronide (intestine)";  // SBO:0000247
  species emp_intestine_2 in Vintestine_2 = 0; emp_intestine_2 is "empagliflozin (intestine)";  // SBO:0000247 CHEBI:82720 pubchem.compound:11949646 inchikey:OBWASQILIWPZMG-QZMOQZSNSA-N
  species eg_intestine_2 in Vintestine_2 = 0; eg_intestine_2 is "empagliflozin glucuronide (intestine)";  // SBO:0000247
  species emp_intestine_3 in Vintestine_3 = 0; emp_intestine_3 is "empagliflozin (intestine)";  // SBO:0000247 CHEBI:82720 pubchem.compound:11949646 inchikey:OBWASQILIWPZMG-QZMOQZSNSA-N
  species eg_intestine_3 in Vintestine_3 = 0; eg_intestine_3 is "empagliflozin glucuronide (intestine)";  // SBO:0000247
  species emp_intestine_4 in Vintestine_4 = 0; emp_intestine_4 is "empagliflozin (intestine)";  // SBO:0000247 CHEBI:82720 pubchem.compound:11949646 inchikey:OBWASQILIWPZMG-QZMOQZSNSA-N
  species eg_intestine_4 in Vintestine_4 = 0; eg_intestine_4 is "empagliflozin glucuronide (intestine)";  // SBO:0000247

  // Parameters:
  // Fraction absorbed, i.e., only a fraction of the empagliflozin in the intestinal lumen is absorbed. This parameter determines how much of the empagliflozin is excreted.
  // F_emp_abs of dose is absorbed. (1-F_emp_abs) is excreted in feces.
  F_emp_abs = 0.65 dimensionless; F_emp_abs is "fraction absorbed empagliflozin";  // SBO:0000002
  EMPABS_k = 0.01 per_min; EMPABS_k is "rate of empagliflozin absorption";  // SBO:0000009
  METEXC_k = 0.001 per_min; METEXC_k is "rate of empagliflozin fecal excretion";  // SBO:0000009
  // 1.0: normal absorption corresponding to tablet under fasting conditions. food decreases the absorption rate, i.e. < 1.0.
  f_absorption = 1 dimensionless; f_absorption is "scaling factor absorption rate dap";  // SBO:0000009
  PODOSE_emp = 0 mg; PODOSE_emp is "oral dose empagliflozin [mg]";  // SBO:0000002
  Ka_dis_emp = 2 per_hr; Ka_dis_emp is "Ka_dis [1/hr] dissolution empagliflozin";  // SBO:0000002
  Mr_emp = 450.909 g_per_mole; Mr_emp is "Molecular weight empagliflozin [g/mole]";  // SBO:0000647
  absorption has mmole_per_min; absorption is "absorption empagliflozin";

  // Assignment rules:
  absorption := f_absorption*EMPABS_k*Vgu*emp_lumen;

  // Rate rules:
  PODOSE_emp' = -dissolution_emp*Mr_emp;

  // Reactions:
  EMPABS: emp_lumen => emp_ext; F_emp_abs*absorption; EMPABS is "absorption empagliflozin";  // SBO:0000655
  EMPEXC: emp_lumen => emp_intestine_0; (1 - F_emp_abs)*absorption; EMPEXC is "excretion empagliflozin (feces)";  // SBO:0000655
  EGEXC: eg_lumen => eg_intestine_0; METEXC_k*Vgu*eg_lumen; EGEXC is "excretion empagliflozin glucuronide (feces)";  // SBO:0000655
  EMPEXC_0: emp_intestine_0 => emp_intestine_1; METEXC_k*Vintestine_0*emp_intestine_0; EMPEXC_0 is "excretion empagliflozin 0";  // SBO:0000655
  EGEXC_0: eg_intestine_0 => eg_intestine_1; METEXC_k*Vintestine_0*eg_intestine_0; EGEXC_0 is "excretion empagliflozin glucuronide 0";  // SBO:0000655
  EMPEXC_1: emp_intestine_1 => emp_intestine_2; METEXC_k*Vintestine_1*emp_intestine_1; EMPEXC_1 is "excretion empagliflozin 1";  // SBO:0000655
  EGEXC_1: eg_intestine_1 => eg_intestine_2; METEXC_k*Vintestine_1*eg_intestine_1; EGEXC_1 is "excretion empagliflozin glucuronide 1";  // SBO:0000655
  EMPEXC_2: emp_intestine_2 => emp_intestine_3; METEXC_k*Vintestine_2*emp_intestine_2; EMPEXC_2 is "excretion empagliflozin 2";  // SBO:0000655
  EGEXC_2: eg_intestine_2 => eg_intestine_3; METEXC_k*Vintestine_2*eg_intestine_2; EGEXC_2 is "excretion empagliflozin glucuronide 2";  // SBO:0000655
  EMPEXC_3: emp_intestine_3 => emp_intestine_4; METEXC_k*Vintestine_3*emp_intestine_3; EMPEXC_3 is "excretion empagliflozin 3";  // SBO:0000655
  EGEXC_3: eg_intestine_3 => eg_intestine_4; METEXC_k*Vintestine_3*eg_intestine_3; EGEXC_3 is "excretion empagliflozin glucuronide 3";  // SBO:0000655
  EMPEXC_4: emp_intestine_4 => emp_feces; METEXC_k*Vintestine_4*emp_intestine_4; EMPEXC_4 is "excretion empagliflozin 4";  // SBO:0000655
  EGEXC_4: eg_intestine_4 => eg_feces; METEXC_k*Vintestine_4*eg_intestine_4; EGEXC_4 is "excretion empagliflozin glucuronide 4";  // SBO:0000655
  // Swallowing, dissolution of tablet, and transport into intestine. Overall process describing the rates of this processes.
  dissolution_emp: $emp_stomach => emp_lumen; Ka_dis_emp/(60 min_per_hr)*PODOSE_emp/Mr_emp; dissolution_emp is "dissolution empagliflozin";

  // Unit definitions:
  unit g_per_mole = gram / mole; g_per_mole is "g/mole";
  unit l_per_min = litre / (60 second); l_per_min is "l/min";
  unit m2 = metre^2; m2 is "meter^2";
  unit mM = 1e-3 mole / litre; mM is "mmole/liter";
  unit mg = 1e-3 gram;
  unit mg_per_min = 1e-3 gram / (60 second); mg_per_min is "mg/min";
  unit mg_per_s_l = 1e-3 gram / (second * litre); mg_per_s_l is "mg/s/l";
  unit min = 60 second;
  unit min_per_hr = 60 second / (3600 second); min_per_hr is "min/hour";
  unit mmole = 1e-3 mole;
  unit mmole_per_min = 1e-3 mole / (60 second); mmole_per_min is "mmole/min";
  unit mmole_per_min_l = 1e-3 mole / (60 second * litre); mmole_per_min_l is "mmole/min/l";
  unit per_hr = 1 / (3600 second); per_hr is "1/hr";
  unit per_min = 1 / (60 second); per_min is "1/min";
  unit per_mmole = 1 / (1e-3 mole); per_mmole is "1/mmole";
end
